Tri-Tiltrotor VTOL  (generated by cad/gen_avl.py -- do not edit)
#Mach
0.0
#IYsym  IZsym  Zsym
0       0      0.0
#Sref     Cref     Bref
0.520000 0.260000 2.000000
#Xref     Yref     Zref        <- CG, aft-positive from wing root LE
0.085424 0.000000 0.000000
#CDp   -- left at zero on purpose: AVL returns INDUCED drag only.
#         The viscous part comes from XFOIL/params.py, and adding a
#         guess here would double-count it.
0.0

#====================================================================
SURFACE
Wing
#Nchordwise  Cspace
12          1.0

YDUPLICATE
0.0

ANGLE
0.0

SECTION
#Xle      Yle      Zle      Chord    Ainc   Nspan Sspace
 0.00000  0.00000  0.00000  0.31049 -0.000   6    -2.0
AFILE
naca2410.dat

SECTION
#Xle      Yle      Zle      Chord    Ainc   Nspan Sspace
 0.02666  0.33500  0.02343  0.27409 -0.670   6    -2.0
AFILE
naca2410.dat

SECTION
#Xle      Yle      Zle      Chord    Ainc   Nspan Sspace
 0.02706  0.34000  0.02378  0.27355 -0.680   6    -2.0
AFILE
naca2410.dat
#            gain  Xhinge  XYZhvec      SgnDup
CONTROL
aileron  1.0  0.7500  0. 0. 0.  -1.0

SECTION
#Xle      Yle      Zle      Chord    Ainc   Nspan Sspace
 0.07480  0.94000  0.06573  0.20834 -1.880   6    -2.0
AFILE
naca2410.dat
#            gain  Xhinge  XYZhvec      SgnDup
CONTROL
aileron  1.0  0.7500  0. 0. 0.  -1.0

SECTION
#Xle      Yle      Zle      Chord    Ainc   Nspan Sspace
 0.07520  0.94500  0.06608  0.20780 -1.890   6    -2.0
AFILE
naca2410.dat

SECTION
#Xle      Yle      Zle      Chord    Ainc   Nspan Sspace
 0.07958  1.00000  0.06993  0.20182 -2.000   6    -2.0
AFILE
naca2410.dat

SECTION
#Xle      Yle      Zle      Chord    Ainc   Nspan Sspace
 0.08711  1.01382  0.07303  0.18231 -2.250   6    -2.0
AFILE
naca2410.dat

SECTION
#Xle      Yle      Zle      Chord    Ainc   Nspan Sspace
 0.09464  1.02641  0.07952  0.16280 -2.500   6    -2.0
AFILE
naca2410.dat

SECTION
#Xle      Yle      Zle      Chord    Ainc   Nspan Sspace
 0.10217  1.03742  0.08844  0.14329 -2.750   6    -2.0
AFILE
naca2410.dat

SECTION
#Xle      Yle      Zle      Chord    Ainc   Nspan Sspace
 0.10971  1.04665  0.09919  0.12378 -3.000   6    -2.0
AFILE
naca2410.dat

SECTION
#Xle      Yle      Zle      Chord    Ainc   Nspan Sspace
 0.11724  1.05397  0.11132  0.10427 -3.250   6    -2.0
AFILE
naca2410.dat

SECTION
#Xle      Yle      Zle      Chord    Ainc   Nspan Sspace
 0.12477  1.05934  0.12443  0.08477 -3.500   6    -2.0
AFILE
naca2410.dat

#====================================================================
SURFACE
Vtail
#Nchordwise  Cspace
12          1.0

YDUPLICATE
0.0

SECTION
#Xle      Yle      Zle      Chord    Ainc   Nspan Sspace
 0.91777  0.00000  0.00300  0.15060  0.000   5    -2.0
AFILE
naca0009.dat

SECTION
#Xle      Yle      Zle      Chord    Ainc   Nspan Sspace
 0.91777  0.05852  0.04624  0.13971  0.000   5    -2.0
AFILE
naca0009.dat

SECTION
#Xle      Yle      Zle      Chord    Ainc   Nspan Sspace
 0.91777  0.06173  0.04861  0.13911  0.000   5    -2.0
AFILE
naca0009.dat
CONTROL
elevator  1.0  0.7000  0. 0. 0.   1.0
CONTROL
rudder    1.0  0.7000  0. 0. 0.  -1.0

SECTION
#Xle      Yle      Zle      Chord    Ainc   Nspan Sspace
 0.91777  0.18633  0.14068  0.11592  0.000   5    -2.0
AFILE
naca0009.dat
CONTROL
elevator  1.0  0.7000  0. 0. 0.   1.0
CONTROL
rudder    1.0  0.7000  0. 0. 0.  -1.0

SECTION
#Xle      Yle      Zle      Chord    Ainc   Nspan Sspace
 0.91777  0.18955  0.14305  0.11532  0.000   5    -2.0
AFILE
naca0009.dat

SECTION
#Xle      Yle      Zle      Chord    Ainc   Nspan Sspace
 0.91777  0.22655  0.17039  0.10843  0.000   5    -2.0
AFILE
naca0009.dat
